*Heading
** Job name: Arch_Bridge Model name: Arch_Bridge
** Generated by: Abaqus/CAE 2020
*Preprint, echo=NO, model=NO, history=NO, contact=NO
**
** PARTS
**
*Part, name="Arch bridge"
*Node
      1,   23.1997776,   1.49999976,  0.662938356
      2,   2.03362703,   1.49999976,   1.15307057
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*Element, type=C3D8R
   1,   14,  345, 1647,  404,    1,   71, 1382,  178
   2,  345,  344, 1648, 1647,   71,   72, 1383, 1382
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*Nset, nset=SET-1
    9,   10,   11,   12,   13,   14
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*Elset, elset=SET-1, generate
 433,  864,    1
*Nset, nset=SET-2
    1,    2,    3,    4,    5,    6
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*Elset, elset=SET-2, generate
   1,  432,    1
*Nset, nset=SET-3
    1,    2,    3,    4,    9,   10
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*Elset, elset=SET-3, generate
 3749,  4664,     1
*Nset, nset=SET-4
    5,    6,    7,    8,   11,   12
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*Elset, elset=SET-4, generate
 1001,  1916,     1
*Nset, nset=SET-5
    3,    4,    5,    6,   10,   11
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*Elset, elset=SET-5, generate
 1917,  3748,     1
*Nset, nset=SET-6
  25,  26,  27,  28,  29,  30
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*Elset, elset=SET-6, generate
 865,  932,    1
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*Elset, elset=LEFT, generate
  933,  1916,     1
*Nset, nset=RIGHT
    1,    2,    3,    4,    9,   10
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*Elset, elset=RIGHT
  865,  866,  867,  868,  869,  870
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** Section: Section-1-SET-2
*Solid Section, elset=SET-2, material="Stone arches"
,
** Section: Section-2-SET-1
*Solid Section, elset=SET-1, material="Stone arches"
,
** Section: Section-3-RIGHT
*Solid Section, elset=RIGHT, material="Side wall right"
,
** Section: Section-4-LEFT
*Solid Section, elset=LEFT, material="Side wall left"
,
** Section: Section-5-SET-5
*Solid Section, elset=SET-5, material="Timber block"
,
*End Part
**
**
** ASSEMBLY
**
*Assembly, name=Assembly
**
*Instance, name="Arch bridge-1", part="Arch bridge"
*End Instance
**
*Nset, nset=SENSOR_POSITION1, instance="Arch bridge-1"
 52,
*Nset, nset=SENSOR_POSITION2, instance="Arch bridge-1"
 52,
*Nset, nset=SENSOR_POSITION3, instance="Arch bridge-1"
 63,
*Nset, nset=SENSOR_POSITION4, instance="Arch bridge-1"
 63,
*Nset, nset=SENSOR_POSITION5, instance="Arch bridge-1"
 1114,
*Nset, nset=SENSOR_POSITION6, instance="Arch bridge-1"
 1114,
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*Nset, nset=SET-1, instance="Arch bridge-1"
   49,   50,   58,   59,   65,   66
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*Elset, elset=SET-1, instance="Arch bridge-1"
 1026, 1171, 1172, 1173, 1174, 1484
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*Nset, nset=SET-2, instance="Arch bridge-1"
   54,   55,   56,   57,   60,   61
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*Elset, elset=SET-2, instance="Arch bridge-1"
 1121, 1130, 1146, 1150, 1153, 1198
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*Nset, nset=SET-3, instance="Arch bridge-1"
   27,   36,   39,   48,   53,   54
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*Elset, elset=SET-3, instance="Arch bridge-1"
 1068, 1069, 1095, 1107, 1117, 1129
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*Nset, nset=SET-4, instance="Arch bridge-1"
   25,   32,   37,   44,   50,   51
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*Elset, elset=SET-4, instance="Arch bridge-1"
 1019, 1020, 1021, 1027, 1031, 1032
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*Nset, nset=SET-5, instance="Arch bridge-1"
   27,   29,   35,   36,   39,   41
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*Elset, elset=SET-5, instance="Arch bridge-1"
  932, 1000, 1068, 1069, 1095, 1107
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*Nset, nset=SET-6, instance="Arch bridge-1"
   25,   30,   32,   33,   37,   42
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*Elset, elset=SET-6, instance="Arch bridge-1"
  865,  933, 1019, 1020, 1021, 1027
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*End Assembly
**
** MATERIALS
**
*Material, name="Side wall left"
*Density
1200.,
*Elastic
 1.8e+09, 0.2
*Material, name="Side wall right"
*Density
1200.,
*Elastic
 1.8e+09, 0.2
*Material, name="Stone arches"
*Density
1600.,
*Elastic
 3e+09, 0.25
*Material, name="Timber block"
*Density
1300.,
*Elastic
 1.5e+09, 0.05
**
** BOUNDARY CONDITIONS
**
** Name: Disp-BC-1 Type: Symmetry/Antisymmetry/Encastre
*Boundary
SET-1, ENCASTRE
** Name: Disp-BC-2 Type: Symmetry/Antisymmetry/Encastre
*Boundary
SET-2, ENCASTRE
** Name: Disp-BC-3 Type: Symmetry/Antisymmetry/Encastre
*Boundary
SET-5, ENCASTRE
** Name: Disp-BC-4 Type: Symmetry/Antisymmetry/Encastre
*Boundary
SET-6, ENCASTRE
** ----------------------------------------------------------------
**
** STEP: Modal Step
**
*Step, name="Modal Step", nlgeom=NO, perturbation
*Frequency, eigensolver=Lanczos, sim, acoustic coupling=on, normalization=mass
18, , , , ,
**
** OUTPUT REQUESTS
**
*Restart, write, frequency=0
**
** FIELD OUTPUT: F-Output-1
**
*Output, field, variable=PRESELECT
*End Step
